//#python -m pip install -r ../requirements.txt

#set run_realtime=1
#set keep_progress=TRUE

clock
{
    timezone "${SHELL gridlabd timezone local}";
    starttime "${SHELL date +'%Y-%m-%d %H:%M:%S'}";
    stoptime "NEVER";
}

#exec ./shelly scan -n=198.129.110.10-198.129.120.100 -f=glm -o=shelly_hub.glm

#include "shelly_hub.glm"
//#include (./shelly scan -f=glm)
